x := 0
A := 0
FRONT := 192
Leg_A := 55
angle_a := 0
r := 0
B := 0
LENGTHS := 292
Leg_B := 74
z := 0
C := 0
MIDDLE := 224
Leg_C := 128
STEP_LONG := 80
FREQ_WORK := 10
y0 := FRONT/2
y0 = 96
x0 := LENGTHS/2
x0 = 146
x1 := MIDDLE/2
x1 = 112
speed := 0.1
way := speed*1000
step := way/FREQ_WORK
step = 10
proekcia := step*acos(angle_a)
angl := atan(proekcia/Leg_A)*57.295779
angl = 15.9393
angl_max := atan(STEP_LONG/2/Leg_A)*57.295779
angl_max = 36.0274
